// COMSOL Multiphysics 6.1.0.357 model "0D Series-Resistor Parallel-Inductor-Capacitor Circuit.mph"
// Outline of the model tree

Physics
  cir: Circuit "Electrical Circuit"
    dependent variable voltages
    gnd1: GroundNode
    V1: VoltageSource | Connections = {1, 0}; value = 5[V]
    R1: Resistor | R = 3e3[Ω]; Connections = {1, 2}
    L1: Inductor | L = 100[mH]; Connections = {2, 0}
    C1: Capacitor | C = 1000[nF]; Connections = {2, 0}

Studies
  std1 "Study 1"
    time: Transient "Time Dependent" | tlist = range(0,1.0e-4,0.037)

Solver configurations
  sol1 "Solution 1" (study std1)
    v1: Variables "Dependent Variables 1"
    t1: Time "Time-Dependent Solver 1" | tlist = range(0,1.0e-4,0.037)
      dDef: Direct
      fc1: FullyCoupled | linsolver = dDef

Datasets
  dset1: Solution | solution = sol1

Plots
  pg1: PlotGroup1D "1D Plot Group 1" | data = dset1
    glob1: Global | expr = comp1.cir.R1_v; unit = V; descr = Voltage across device R1