// COMSOL Multiphysics 6.1.0.357 model "Roger Chapter 1.mph"
// Outline of the model tree

Parameters
  T_in = 70 [degF]  // Interior Temperature
  T_out = 0 [degF]  // Exterior Temperature
  p = 1 [atm]  // Air Pressure

Geometry
  geom1 "Geometry 1" (1D, length unit m)
    i1: Interval | specify = len; lensource = vector; lenvec = 5e-3[m]
    fin: Finalize "Form Union"

Materials
  mat1: Common "Silica glass" on all domains
    def "Basic"
      relpermeability = 1
      electricconductivity = 1e-14[S/m]
      thermalexpansioncoefficient = 0.55e-6[1/K]
      heatcapacity = 703[J/(kg*K)]
      relpermittivity = 3.75
      density = 2203[kg/m^3]
      thermalconductivity = 1.38[W/(m*K)]
    Enu "Young's modulus and Poisson's ratio"
      E = 73.1[GPa]
      nu = 0.17
    RefractiveIndex
      n = 1.45
      ki = 0

Physics
  ht: HeatTransfer "Heat Transfer in Solids" on all domains
    dependent variable T
    solid1: SolidHeatTransferModel "Solid 1" (default)
    init1: init "Initial Values 1" (default)
    ins1: ThermalInsulation (default)
    hf1: HeatFluxBoundary "Heat Flux 1" on boundaries 1
      HeatFluxType = ConvectiveHeatFlux
      h = 15
      Text = T_in
      materialType = from_mat
    hf2: HeatFluxBoundary "Heat Flux 2" on boundaries 2 | HeatFluxType = ConvectiveHeatFlux; h = 15; Text = T_in

Mesh
  mesh1 "Mesh 1" (physics-controlled)

Studies
  std1 "Study 1"
    stat: Stationary

Solver configurations
  sol1 "Solution 1" (study std1)
    v1: Variables "Dependent Variables 1"
    s1: Stationary "Stationary Solver 1"
      fc1: FullyCoupled | linsolver = d1; initstep = 0.01; minstep = 1.0E-6; maxiter = 50
      d1: Direct "Direct, heat transfer variables (ht)" | linsolver = pardiso; pivotperturb = 1.0E-13

Datasets
  dset1: Solution | solution = sol1

Plots
  pg1: PlotGroup1D "Temperature (ht)" | data = dset1
    lngr1: LineGraph on domains 1 | expr = T; unit = degF; xdata = expr; xdataexpr = x