// COMSOL Multiphysics 6.1.0.357 model "1 D 3 Pane Window Heat Flow.mph"
// Outline of the model tree

Parameters
  T_in = 70[degF]  // Interiror Temperature
  T_out = 0[degF]  // Exteriror Temperature
  h_sg = 15[W/(m^2*K)]  // Heat Transfer Coefficient
  p = 1[atm]  // Air Pressure

Geometry
  geom1 "Geometry 1" (1D, length unit m)
    i1: Interval | specify = len; left = 0.0; lensource = vector; lenvec = 5e-3[m]
    i2: Interval | specify = len; left = 5e-3; lensource = vector; lenvec = 15e-3
    i3: Interval | specify = len; left = 20e-3; lensource = vector; lenvec = 5e-3
    i4: Interval | specify = len; left = 25e-3; lensource = vector; lenvec = 15e-3
    i5: Interval | specify = len; left = 40e-3; lensource = vector; lenvec = 5e-3
    fin: Finalize "Form Union"

Materials
  mat1: Common "Silica glass" on domains 1, 3, 5
    def "Basic"
      relpermeability = 1
      electricconductivity = 1e-14[S/m]
      thermalexpansioncoefficient = 0.55e-6[1/K]
      heatcapacity = 703[J/(kg*K)]
      relpermittivity = 3.75
      density = 2203[kg/m^3]
      thermalconductivity = 1.38[W/(m*K)]
    Enu "Young's modulus and Poisson's ratio"
      E = 73.1[GPa]
      nu = 0.17
    RefractiveIndex
      n = 1.45
      ki = 0
  mat2: Common "Argon" on domains 2
    def "Basic"
      thermalconductivity = 1.7e-2
      density = 1.784
      heatcapacity = 523.0
  mat3: Common "Air" on domains 4
    def "Basic"
      thermalexpansioncoefficient = alpha_p(pA,T)
      molarmass = 0.02897[kg/mol]
      bulkviscosity = muB(T)
      relpermeability = 1
      relpermittivity = 1
      dynamicviscosity = eta(T)
      ratioofspecificheat = 1.4
      electricconductivity = 0[S/m]
      heatcapacity = Cp(T)
      density = rho(pA,T)
      thermalconductivity = k(T)
      soundspeed = cs(T)
      eta: Piecewise | arg = T; pieces = {200.0, 1600.0, -8.38278E-7+8.35717342E-8*T^1-7.69429583E-11*T^2+4.6437266E-14*T^3-1.06585607E-17*T^4}; argunit = K; fununit = Pa*s
      Cp: Piecewise | arg = T; pieces = {200.0, 1600.0, 1047.63657-0.372589265*T^1+9.45304214E-4*T^2-6.02409443E-7*T^3+1.2858961E-10*T^4}; argunit = K; fununit = J/(kg*K)
      rho: Analytic | expr = pA*0.02897/R_const[K*mol/J]/T; args = {pA, T}; fununit = kg/m^3; argunit = {Pa, K}
      k: Piecewise | arg = T; pieces = {200.0, 1600.0, -0.00227583562+1.15480022E-4*T^1-7.90252856E-8*T^2+4.11702505E-11*T^3-7.43864331E-15*T^4}; argunit = K; fununit = W/(m*K)
      cs: Analytic | expr = sqrt(1.4*R_const[K*mol/J]/0.02897*T); args = T; fununit = m/s; argunit = K
      an1: Analytic | funcname = alpha_p; expr = -1/rho(pA,T)*d(rho(pA,T),T); args = {pA, T}; fununit = 1/K; argunit = {Pa, K}
      an2: Analytic "Analytic 2a" | funcname = muB; expr = 0.6*eta(T); args = T; fununit = Pa*s; argunit = K
    RefractiveIndex
      n = 1
      ki = 0
    NonlinearModel
      BA = (def.gamma+1)/2
    idealGas
      Rs = R_const/Mn
      heatcapacity = Cp(T)
      ratioofspecificheat = 1.4
      molarmass = 0.02897
      Cp: Piecewise | arg = T; pieces = {200.0, 1600.0, 1047.63657-0.372589265*T^1+9.45304214E-4*T^2-6.02409443E-7*T^3+1.2858961E-10*T^4}; argunit = K; fununit = J/(kg*K)

Physics
  ht: HeatTransfer "Heat Transfer in Solids" on all domains
    dependent variable T
    solid1: SolidHeatTransferModel "Solid 1" (default)
    init1: init "Initial Values 1" (default)
    ins1: ThermalInsulation (default)
    hf1: HeatFluxBoundary "Heat Flux 1" on boundaries 1 | HeatFluxType = ConvectiveHeatFlux; h = h_sg; Text = T_in
    hf2: HeatFluxBoundary "Heat Flux 2" on boundaries 6
      HeatFluxType = ConvectiveHeatFlux
      h = h_sg
      Text = T_out
      materialType = from_mat
    solid2: SolidHeatTransferModel "Solid 2" on domains 1, 3, 5 | k_mat = from_mat; rho_mat = from_mat; Cp_mat = from_mat
    solid3: SolidHeatTransferModel "Solid 3" on domains 4
      k_mat = userdef
      k = 8.8e-3
      rho_mat = userdef
      rho = 3.743
      Cp_mat = userdef
      Cp = 248

Mesh
  mesh1 "Mesh 1" (physics-controlled)

Studies
  std1 "Study 1"
    stat: Stationary

Solver configurations
  sol1 "Solution 1" (study std1)
    v1: Variables "Dependent Variables 1"
    s1: Stationary "Stationary Solver 1"
      fc1: FullyCoupled | linsolver = d1; initstep = 0.01; minstep = 1.0E-6; maxiter = 50
      d1: Direct "Direct, heat transfer variables (ht)" | linsolver = pardiso; pivotperturb = 1.0E-13

Datasets
  dset1: Solution | solution = sol1

Plots
  pg1: PlotGroup1D "Temperature (ht)" | data = dset1
    lngr1: LineGraph on domains 1-5 | expr = T; unit = degC; xdata = expr; xdataexpr = x