// COMSOL Multiphysics 6.1.0.357 model "1D Spherically Symmetric Transport-Time dependent Heat Transfer.mph"
// Outline of the model tree
// Unit system: none

Parameters
  rho = 2000 [kg/m^3]  // Density
  cp = 300 [J/(kg*K)]  // Heat capacity
  k = 0.5 [W/(m*K)]  // Thermal conductivity
  Rp = 0.005 [m]  // Sphere radius
  Qs = 0 [W/m^3]  // Heat source
  hs = 1000 [W/(m^2*K)]  // Heat transfer coefficient
  Text = 368 [K]  // External temperature
  Tinit = 298 [K]  // Initial temperature

Geometry
  geom1 "Geometry 1" (1D, length unit m)
    i1: Interval | coord = 0, 1
    fin: Finalize "Form Union"

Physics
  g: GeneralFormPDE on all domains
    dependent variable T
    EquationForm.form = Automatic
    gfeq1: GeneralFormPDE (default) | f = x^2*Qs; Ga = -k*(x^2/Rp^2)*Tx; da = x^2*rho*cp
    zflx1: ZeroFluxBoundary "Zero Flux 1" (default)
    init1: init "Initial Values 1" (default) | T = Tinit
    flux1: FluxBoundary "Flux/Source 1" on boundaries 1
    flux2: FluxBoundary "Flux/Source 2" on boundaries 2 | g = (x^2/Rp)*hs*(Text-T)

Mesh
  mesh1 "Mesh 1"
    size: MeshSizeDefault | hmax = 0.067; hmin = 3.0E-4; hcurve = 0.3; hgrad = 1.3
    sca1: Scale on entire geometry | scale = 0.4
    edg1: Edge on remaining entities

Studies
  std1 "Study 1"
    time: Transient "Time Dependent" | tlist = range(0,0.25,10)

Solver configurations
  sol1 "Solution 1" (study std1)
    v1: Variables "Dependent Variables 1"
    t1: Time "Time-Dependent Solver 1" | tlist = range(0,0.25,10)
      dDef: Direct
      fc1: FullyCoupled | linsolver = dDef

Datasets
  dset1: Solution | solution = sol1

Plots
  pg1: PlotGroup1D "General Form PDE" | data = dset1; title = Temperature; xlabel = Dimensionless Radius; ylabel = T (K)
    lngr1: LineGraph on domains 1 | expr = T; xdata = expr; xdataexpr = x
  pg2: PlotGroup1D "1D Plot Group 2"
    data = dset1
    title = Temperature Response at Sphere Center
    xlabel = Time (s)
    ylabel = T (K)
    ptgr1: PointGraph on boundaries 1 | expr = T

Exports
  anim1: Animation | target = player
  anim2: Animation | giffilename = /Applications/COMSOL61/Temperature Response at Sphere Center.gif