// COMSOL Multiphysics 6.1.0.357 model "1D Telegraph Equation.mph"
// Outline of the model tree
// Unit system: none

Parameters
  c = 0.25  // pde coef param beta
  alpha = 0.25  // Pde coef param alpha
  beta = 1  // Transport velocity

Geometry
  geom1 "Geometry 1" (1D, length unit m)
    i1: Interval | coord = 0, 1; lensource = vector; lenvec = 1
    fin: Finalize "Form Union"

Physics
  c: CoefficientFormPDE on all domains
    dependent variable u
    EquationForm.form = Automatic
    cfeq1: CoefficientFormPDE (default) | c = c*c; a = alpha*beta; f = (alpha+beta)*ut; ea = 1; da = 0
    zflx1: ZeroFluxBoundary "Zero Flux 1" (default)
    init1: init "Initial Values 1" (default) | u = exp(-3*((x/0.2)-1)^2)

Mesh
  mesh1 "Mesh 1"
    size: MeshSizeDefault | hmax = 0.067; hmin = 3.0E-4; hcurve = 0.3; hgrad = 1.3
    edg1: Edge on remaining entities
    ref1: Refine on entire geometry

Studies
  std1 "Study 1"
    param: Parametric "Parametric Sweep" | pname = {alpha, beta}; plistarr = {.25 0.5 1 2, .25 0.5 1 2}; punit = {, }
    time: Transient "Time Dependent" | tlist = range(0,0.1,1)

Solver configurations
  sol1 "Solution 1" (study std1)
    v1: Variables "Dependent Variables 1"
    t1: Time "Time-Dependent Solver 1" | tlist = range(0,0.1,1); timemethod = genalpha
      dDef: Direct
      fc1: FullyCoupled | linsolver = dDef
  sol2 "Parametric Solutions 1" (study std1)

Datasets
  dset1: Solution | solution = sol1
  dset2: Solution | solution = sol2

Plots
  pg1: PlotGroup1D "Coefficient Form PDE" | data = dset2
    lngr1: LineGraph on domains 1 | expr = u; xdata = expr; xdataexpr = x
  pg2: PlotGroup1D "1D Plot Group 2" | data = dset2
    lngr1: LineGraph on all domains | expr = u; xdataexpr = x

Exports
  anim1: Animation | target = player
  anim2: Animation | giffilename = /Applications/COMSOL61/1D Telegraph equation animation.gif