// COMSOL Multiphysics 6.1.0.357 model "2D Hall Effect.mph"
// Outline of the model tree

Parameters
  sigma0 = 1.04e3[S/m]
  Rh = 1.25e-4[m^3/C]
  Bz = 0.1[T]
  coeff0 = sigma0/(1+(sigma0*Rh*Bz)^2)
  V0 = 5.0[V]
  t_Si = 1.0e-3[m]
  coeff1 = sigma0*Rh*Bz
  s11 = coeff0
  s12 = coeff0*coeff1
  s21 = -coeff0*coeff1
  s22 = coeff0
  epsilon_Si = 11.68

Geometry
  geom1 "Geometry 1" (2D, length unit m)
    r1: Rectangle | pos = {-9e-3, -3e-3}; size = {1.8e-2, 6e-3}
    pt1: Point | p = {-1e-3, 3e-3}
    pt2: Point | p = {1e-3, 3e-3}
    pt3: Point | p = {-1e-3, -3e-3}
    pt4: Point | p = {1e-3, -3e-3}
    fin: Finalize "Form Union"

Physics
  ec: ConductiveMedia "Electric Currents" on all domains
    dependent variable V
    d.d = t_Si
    cucn1: CurrentConservation (default)
      sigma_mat = userdef
      sigma = {s11, s21, 0, s12, s22, 0, 0, 0, 0}
      epsilonr_mat = userdef
      epsilonr = epsilon_Si
    ein1: ElectricInsulation (default)
    init1: init "Initial Values 1" (default)
    ein2: ElectricInsulation on boundaries 2, 3, 6, 7
    gnd1: Ground on boundaries 1
    pot1: ElectricPotential on boundaries 8 | V0 = V0
    fp1: FloatingPotential on boundaries 5
    fp2: FloatingPotential on boundaries 4

Mesh
  mesh1 "Mesh 1" (physics-controlled)
    size: MeshSizeDefault | hauto = 2

Studies
  std1 "Study 1"
    param: Parametric "Parametric Sweep" | pname = Bz; plistarr = range(0,0.1,2); punit = T
    stat: Stationary

Solver configurations
  sol1 "Solution 1" (study std1)
    v1: Variables "Dependent Variables 1"
    s1: Stationary "Stationary Solver 1"
      dDef: Direct
      p1: Parametric | pname = Bz; plistarr = range(0,0.1,2); punit = T; pcontinuationmode = no
      fc1: FullyCoupled | linsolver = dDef

Datasets
  dset1: Solution | solution = sol1

Plots
  pg1: PlotGroup2D "Electric Potential (ec)" | data = dset1
    surf1: Surface | expr = V
    str1: Streamline on boundaries 1-8 | expr = {ec.Ex, ec.Ey}; udist = 0.02
      col1: Color "Color Expression 1" | expr = V
      filt1: Filter | expr = !isScalingSystemDomain
    con1: Contour | expr = V
  pg2: PlotGroup2D "Electric Field Norm (ec)" | data = dset1
    surf1: Surface | expr = ec.normE
    str1: Streamline on boundaries 1-8 | expr = {ec.Ex, ec.Ey}; udist = 0.02
      col1: Color "Color Expression 1" | expr = ec.normE
      filt1: Filter | expr = !isScalingSystemDomain

Exports
  anim1: Animation | target = player
  anim2: Animation | giffilename = /Applications/COMSOL61/Animation- 2D Hall Effect.gif