// COMSOL Multiphysics 6.1.0.357 model "2D Superconducting disk in a magnetic field.mph"
// Outline of the model tree

Parameters
  r0 = 10[mm]
  h0 = 2[mm]
  R0 = 20[mm]
  H0 = 20[mm]
  B0 = 1[T]
  LL = 0.00016[mm]

Geometry
  geom1 "Geometry 1" (2D axisymmetric, length unit m)
    r1: Rectangle "Disk" | pos = {0, -h0/2}; size = {r0, h0}
    r2: Rectangle "Box" | pos = {0, -H0/2}; size = {R0, H0}
    fin: Finalize "Form Union"

Physics
  c: CoefficientFormPDE on all domains
    dependent variable u
    EquationForm.form = Automatic
    cfeq1: CoefficientFormPDE (default) | c = {1, 0, 0, 1}; a = (r < r0) * (z^2 < h0^2/4)/(LL^2); f = 0; da = 0
    zflx1: ZeroFluxBoundary "Zero Flux 1" (default)
    init1: init "Initial Values 1" (default)
    dir1: DirichletBoundary "Dirichlet Boundary Condition 1" on boundaries 9 | r = B0*R0/2
    dir2: DirichletBoundary "Dirichlet Boundary Condition 2" on boundaries 2, 7 | r = B0*r0/2
    dir3: DirichletBoundary "Dirichlet Boundary Condition 3" on boundaries 1, 3, 5 | r = 0

Mesh
  mesh1 "Mesh 1" (physics-controlled)
    size: MeshSizeDefault | hauto = 2

Studies
  std1 "Study 1"
    stat: Stationary

Solver configurations
  sol1 "Solution 1" (study std1)
    v1: Variables "Dependent Variables 1"
    s1: Stationary "Stationary Solver 1"
      dDef: Direct
      fc1: FullyCoupled | linsolver = dDef

Datasets
  dset1: Solution | solution = sol1
  rev1: Revolve2D "Revolution 2D 1" | data = dset1; startangle = -180; revangle = 180

Plots
  pg1: PlotGroup2D "Coefficient Form PDE" | data = dset1
    surf1: Surface | expr = (uz)^2 + (u/(r + 0.0000001) + ur)^2
    arws1: ArrowSurface | expr = {-uz, (u + r * ur)/r}
  pg2: PlotGroup3D "Coefficient Form PDE 1" | data = rev1
    surf1: Surface | expr = u
    arwv1: ArrowVolume | revcoordsys = cylindrical; expr = {-uz, 0, u/r + ur}; arrowymethod = coord; ycoord = 0