// COMSOL Multiphysics 6.1.0.357 model "3D Spiral Coil Microinductor .mph"
// Outline of the model tree

Geometry
  geom1 "Geometry 1" (3D, length unit m)
    blk1: Block | pos = {0e-6, 0e-6, 0e-6}; size = {60e-6, 20e-6, 20e-6}
    blk2: Block | pos = {40e-6, 20e-6, 0}; size = {20e-6, 80e-6, 20e-6}
    blk3: Block | pos = {40e-6, 100e-6, 0}; size = {200e-6, 20e-6, 20e-6}
    blk4: Block | pos = {220e-6, -40e-6, 0}; size = {20e-6, 140e-6, 20e-6}
    blk5: Block | pos = {80e-6, -60e-6, 0}; size = {160e-6, 20e-6, 20e-6}
    blk6: Block | pos = {80e-6, -40e-6, 0}; size = {20e-6, 100e-6, 20e-6}
    blk7: Block | pos = {80e-6, 60e-6, 0}; size = {120e-6, 20e-6, 20e-6}
    blk8: Block | pos = {180e-6, 0, 0}; size = {20e-6, 60e-6, 20e-6}
    blk9: Block | pos = {120e-6, -20e-6, 0}; size = {80e-6, 20e-6, 20e-6}
    blk10: Block | pos = {120e-6, 0, 0}; size = {20e-6, 20e-6, 20e-6}
    blk11: Block | pos = {120e-6, 20e-6, 0}; size = {40e-6, 20e-6, 20e-6}
    blk12: Block | pos = {140e-6, 20e-6, 20e-6}; size = {20e-6, 20e-6, 20e-6}
    blk13: Block | pos = {140e-6, 20e-6, 40e-6}; size = {140e-6, 20e-6, 20e-6}
    blk14: Block | pos = {260e-6, 20e-6, 20e-6}; size = {20e-6, 20e-6, 20e-6}
    blk15: Block | pos = {260e-6, 20e-6, 0}; size = {40e-6, 20e-6, 20e-6}
    fin: Finalize "Form Union"

Physics
  mef: ElectricInductionCurrents "Magnetic and Electric Fields" on all domains
    dependent variable A = {Ax, Ay, Az}
    alc1: ElectromagneticModel "Ampère's Law and Current Conservation 1" (default)
    mi1: MagneticInsulation (default)
      gnd1: Ground (default) | constraintType = symmetricConstraint; constraintMethod = elemental
    init1: init "Initial Values 1" (default)

Mesh
  mesh1 "Mesh 1" (physics-controlled)

Studies
  std1 "Study 1"
    stat: Stationary